f(x) :=
    z ← (x^2 + 2*x - 3 + (x + 1)*sqrt(x^2 - 9))/(x^2 - 2*x - 3 + (1 - x)*sqrt(x^2 - 9))
    return z
f(2) = -2.14286 - 0.638877i
x := 1, 1.5 .. 5
a := 2.5
f(x) :=
    x^3*sqrt(x - a) if x > a
    (x*sin(a*x)) if x == a
    (exp(-a*x)*cos(a*x)) if x < a
x = [1; 1.5; 2; 2.5; 3; 3.5; 4; 4.5; 5]
f(x) = [-0.0657619; -0.0192977; 0.0019113; -0.082948; 19.0919; 42.875; 78.3837; 128.87; 197.642]
f(j) :=
    j ← 2
    m ← 3
    i ← 0
    a ← 1.4*10^-3
    while j ≤ 1
        f[i] ← m^2 + j if j < 3
        f[i] ← sin(a) + j if j ≥ 3
        j ← j + 0.25
        i ← i + 1
    return f
f(j) → 0
