# лабора
# 1. Лабораторная работа №1 студента 1 курса 3 группы ФИТ Бобр Виктории
2.
4*sqrt(5 - 2*sqrt(6))/((nthroot(3, 4) + nthroot(2, 4))*(nthroot(2, 4) - nthroot(3, 4))) = -4
y := (sqrt(9^3 + 1) + cos(|9 - 1|))/nthroot(9^5 + 8*9 + 1, 4) = 1.72337
t := (sum(sin(i/1), i = 1 .. 10) + sum((i - 1)/(i + 1), i = 1 .. 5))/product((1 + 3*i)/(1^2 + 1*i - 1), i = 1 .. 5) = 0.00723459
3.
x := -2, -1.8 .. 2
y(x) := (3^sin(2*x) - cos(2*x)^2)^3
x = [-2; -1.8; -1.6; -1.4; -1.2; -1; -0.8; -0.6; -0.4; -0.2; 0; 0.2; 0.4; 0.6; 0.8; 1; 1.2; 1.4; 1.6; 1.8; 2]
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y(x) = [6.53245; 0.555173; 0.000337722; -0.00749284; -0.000309234; 0.00742424; 0.0368054; 0.0118322; -2.89079e-5; -0.00757856; 0; 0.322203; 5.03367; 18.6701; 26.9391; 16.4315; 3.77116; 0.172893; -0.000202364; -0.00677179; 5.46361e-7]
B := [7, 16, 10; 99, 54, 8; 4, 40, 5]
A := [1, 3, 6; 9, 10, 8; 5, 15, 28]
C := A*B = [328, 418, 64; 1085, 1004, 210; 1632, 2010, 310]
V := [5; 7; 8]
d := |A|*|B| = 1009188
E := A^-1*C - B = [0, 0, 0; 0, 0, 0; 0, 2.27374e-13, 2.84217e-14]
g := transpose(V)*A*V = 4455
S := B*V = [227; 937; 340]
q := max(A) = 28
p := min(B) = 4
5.
a := π/6
b := π
integral((t - 1)*sin(t - 2), t = a .. b) = 0.968725
# 6.
x := -5, -4.8 .. 5
y := -5, -4.8 .. 5
n := 60
f(x) := sin(x)*sin(y)
