1.
x := -3 .. 3
f1(x) := x - sin(x) - 1
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x := -3 .. 3
f2(x) := (x - 3)*cos(x + 2) - 1
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x := 0
root(f1(x), x) = 1.93456
root(f2(x), x) = -0.100842
2.
g(x) := x^4 - 2*x^3 + x^2 - 12*x + 20
k := [20; -12; 1; -2; 1]
x := polyroots(k) = [-1 - 2i; -1 + 2i; 1.99946; 2.00054]
x1 := 1
x2 := 1
x3 := 1
x4 := 1
3.
Given
2*x1 + x2 + 2*x3 + 3*x4 = 1*8
3*x1 + 3*x3 = 1*6
2*x1 - x2 + 3*x4 = 1*4
x1 + 2*x2 - x3 + 2*x4 = 1*4
Find(x1, x2, x3, x4) = [1; 1; 1; 1]
A := [2, 1, 2, 3; 3, 0, 0, 3; 2, -1, 0, 3; 1, 2, -1, 2]
B := [8; 6; 4; 4]
[x1; x2; x3; x4] := A^-1*B = [1; 1; 1; 1]
lsolve(A, B) = [1; 1; 1; 1]
9
4, □
f2(y) := 0.7 - cos(y - 1)
f1(x) := (2 - sin(x))/2
x := -0.29
y := 1.143
Given
y == (2 - sin(x))/2
x == 0.7 - cos(y - 1)
[x; y] := Minerr(x, y) = [-0.289809; 1.14288]
