# Лабораторная работа №3
# Задание 1.
limit((sqrt(2*x + 1) - 3)/(sqrt(x - 2) - sqrt(2)), x → 4) → 2*sqrt(2)/3
d/dx((3^sin(2*x) - cos(2*x)^2)^3) → 3*(cos(2*x)^2 - 3^sin(2*x))^2*(4*cos(2*x)*sin(2*x) + 2*3^sin(2*x)*cos(2*x)*ln(3))
integral((5*x + 3)^10, x) → (5*x + 3)^11/55
# Задание 2.
x - sin(x) - 1 == 0 solve → 1.93456321075
(x - 3)*cos(x + 2) - 1 == 0 solve → -0.10084154401
x^4 - 2*x^3 + x^2 - 12*x + 20 == 0 solve → [2; 2; -1 + 2i; -1 - 2i]
# Задание 3.
f1(x) := sqrt(x)
x := -5 .. 5
f2(x) := e^x
f3(x) := ln(x)
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# Задание 4.
j := 2, 2.25 .. 4
m := 3
a := 1.4*10^-3
f(j) := if(j < 3, m^2 + j, sin(a) + j)  # error: Evaluation not allowed in this definition.
